*Heading
** Job name: Job-1 Model name: Model-1
** Generated by: Abaqus/CAE 6.14-4
*Preprint, echo=NO, model=NO, history=NO, contact=NO
**
** PARTS
**
*Part, name=Part-3
*Node
      1,   15.3744659,  -2.97261286,   1.37682199
      2,   17.6244659,  -2.97267008,   1.37725854
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*Element, type=B33
1, 1, 2
2, 3, 2
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*Nset, nset=Wire-1-Set-1
 172, 175, 250, 251
*Elset, elset=Wire-1-Set-1
 546, 551, 709
*Nset, nset=Wire-2-Set-1
 114, 115, 116, 117, 118, 119, 120, 121, 169, 172, 174, 180, 181
*Elset, elset=Wire-2-Set-1
 231, 233, 234, 238, 240, 367, 377, 381, 383, 550, 555, 564
*Nset, nset=Wire-3-Set-1
 155, 166, 167, 169, 178, 240
*Elset, elset=Wire-3-Set-1
 348, 391, 511, 552, 704
*Nset, nset=Wire-4-Set-1
 157, 168, 173, 218, 248
*Elset, elset=Wire-4-Set-1
 483, 484, 543, 554
*Nset, nset=Wire-5-Set-1
 118, 173
*Elset, elset=Wire-5-Set-1
 365,
*Nset, nset=Wire-6-Set-1
 112, 113, 153, 159, 160
*Elset, elset=Wire-6-Set-1
 229, 338, 339, 480
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** Region: (Section-1:Set-50), (Beam Orientation:Set-28)
*Elset, elset=_I1, internal
   1,   2,   3,   4,   5,   6
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** Section: Section-1  Profile: Profile-1
*Beam Section, elset=_I1, material=Material-1, temperature=GRADIENTS, section=CIRC
0.2
0.,0.13,0.99
** Region: (Section-1:Set-50), (Beam Orientation:mian5)
*Elset, elset=_I2, internal
 13, 14, 15, 16, 21, 22, 32, 33, 47, 48, 84, 87, 88, 91, 92, 93
** Section: Section-1  Profile: Profile-1
*Beam Section, elset=_I2, material=Material-1, temperature=GRADIENTS, section=CIRC
0.2
0.7,-0.7,0.
** Region: (Section-1:Set-50), (Beam Orientation:Set-29)
*Elset, elset=_I3, internal
  23,  24,  25,  26,  27,  34
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** Section: Section-1  Profile: Profile-1
*Beam Section, elset=_I3, material=Material-1, temperature=GRADIENTS, section=CIRC
0.2
0.,0.13,-0.99
** Region: (Section-1:Set-50), (Beam Orientation:mian3)
*Elset, elset=_I4, internal
  28,  29,  75,  76,  81,  82,  90, 108, 110, 111, 209, 210, 211, 214, 215, 289
** Section: Section-1  Profile: Profile-1
*Beam Section, elset=_I4, material=Material-1, temperature=GRADIENTS, section=CIRC
0.2
0.8,-0.5,0.
** Region: (Section-1:Set-50), (Beam Orientation:Set-31)
*Elset, elset=_I5, internal
  35,  36,  37, 121, 122, 123
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** Section: Section-1  Profile: Profile-1
*Beam Section, elset=_I5, material=Material-1, temperature=GRADIENTS, section=CIRC
0.2
0.99,0.13,0.
** Region: (Section-1:Set-50), (Beam Orientation:mian6)
*Elset, elset=_I6, internal
  43,  44, 141, 142, 155, 156, 160, 162, 163, 282, 283, 284, 287, 589
** Section: Section-1  Profile: Profile-1
*Beam Section, elset=_I6, material=Material-1, temperature=GRADIENTS, section=CIRC
0.2
-0.7,-0.7,0.
** Region: (Section-1:Set-50), (Beam Orientation:mian4)
*Elset, elset=_I7, internal
  52,  53, 146, 147, 150, 151, 152, 153, 164, 165, 177, 178, 276, 279, 281, 408
** Section: Section-1  Profile: Profile-1
*Beam Section, elset=_I7, material=Material-1, temperature=GRADIENTS, section=CIRC
0.2
-0.8,-0.5,0.
** Region: (Section-1:Set-50), (Beam Orientation:Set-32)
*Elset, elset=_I8, internal
  60,  61,  62,  63,  64,  66
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** Section: Section-1  Profile: Profile-1
*Beam Section, elset=_I8, material=Material-1, temperature=GRADIENTS, section=CIRC
0.2
-0.99,0.13,0.
** Region: (Section-1:Set-50), (Beam Orientation:mian7)
*Elset, elset=_I9, internal
  85,  94, 100, 107, 113, 114
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** Section: Section-1  Profile: Profile-1
*Beam Section, elset=_I9, material=Material-1, temperature=GRADIENTS, section=CIRC
0.2
1.,0.,0.
** Region: (Section-1:Set-50), (Beam Orientation:mian9)
*Elset, elset=_I10, internal
  98, 103, 116, 117, 225, 242, 364, 546, 551, 555
** Section: Section-1  Profile: Profile-1
*Beam Section, elset=_I10, material=Material-1, temperature=GRADIENTS, section=CIRC
0.2
0.8,-0.5,0.
** Region: (Section-1:Set-50), (Beam Orientation:mian8)
*Elset, elset=_I11, internal
 229, 334, 338, 339, 348, 365
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** Section: Section-1  Profile: Profile-1
*Beam Section, elset=_I11, material=Material-1, temperature=GRADIENTS, section=CIRC
0.2
0.,1.,0.
** Region: (Section-1:Set-50), (Beam Orientation:Set-39)
*Elset, elset=_I12, internal
 233, 234, 238, 240, 383, 607, 739, 743, 745, 751
** Section: Section-1  Profile: Profile-1
*Beam Section, elset=_I12, material=Material-1, temperature=GRADIENTS, section=CIRC
0.2
0.,1.,0.
** Region: (Section-1:Set-50), (Beam Orientation:Set-48)
*Elset, elset=_I13, internal
 377, 550, 564
** Section: Section-1  Profile: Profile-1
*Beam Section, elset=_I13, material=Material-1, temperature=GRADIENTS, section=CIRC
0.2
0.2,0.8,0.
** Region: (Section-1:Set-50), (Beam Orientation:Set-47)
*Elset, elset=_I14, internal
 413, 414, 422, 427, 496, 594, 599, 613, 677, 678, 777
** Section: Section-1  Profile: Profile-1
*Beam Section, elset=_I14, material=Material-1, temperature=GRADIENTS, section=CIRC
0.2
-0.8,-0.5,0.
** Region: (Section-1:Set-50), (Beam Orientation:Set-49)
*Elset, elset=_I15, internal
 498, 682, 684
** Section: Section-1  Profile: Profile-1
*Beam Section, elset=_I15, material=Material-1, temperature=GRADIENTS, section=CIRC
0.2
-0.2,0.8,0.
** Region: (Section-1:Set-50)
*Elset, elset=_I16, internal
 709,
** Section: Section-1  Profile: Profile-1
*Beam Section, elset=_I16, material=Material-1, temperature=GRADIENTS, section=CIRC
0.2
0.,0.,-1.
*End Part
**
**
** ASSEMBLY
**
*Assembly, name=Assembly
**
*Instance, name=Part-3-1, part=Part-3
*End Instance
**
*Nset, nset=Set-1, instance=Part-3-1
 283, 302, 325, 328
*Nset, nset=Set-2, instance=Part-3-1
 291,
*End Assembly
**
** MATERIALS
**
*Material, name=Material-1
*Density
7900.,
*Elastic
 2.06e+11, 0.3
** ----------------------------------------------------------------
**
** STEP: Step-1
**
*Step, name=Step-1, nlgeom=NO
*Dynamic,direct
1.,100.,
**
** BOUNDARY CONDITIONS
**
** Name: BC-1 Type: 对称/反对称/完全固定
*Boundary
Set-1, ENCASTRE
**
** LOADS
**
** Name: Load-1   Type: Concentrated force
*Cload
Set-2, 2, 10000.
**
** OUTPUT REQUESTS
**
*Restart, write, frequency=0
**
** FIELD OUTPUT: F-Output-1
**
*Output, field, variable=PRESELECT, frequency=1
**
** HISTORY OUTPUT: H-Output-1
**
*Output, history, variable=PRESELECT, frequency=1
*End Step
